# OpenSim document version 40600
InverseKinematicsTool trial_bc9f2352d8_LSTM:
  results_directory: E:\AxonAIRepo\axonai_vps\Data\session_bc9f2352d8_scaled\OpenSimData\OpenPose_default\Kinematics
  model_file: E:\AxonAIRepo\axonai_vps\Data\session_bc9f2352d8_scaled\OpenSimData\OpenPose_default\Model\LaiUhlrich2022_scaled_no_patella.osim
  constraint_weight: Inf
  accuracy: 1e-5
  time_range: -Inf Inf
  output_motion_file: E:\AxonAIRepo\axonai_vps\Data\session_bc9f2352d8_scaled\OpenSimData\OpenPose_default\Kinematics\trial_bc9f2352d8_LSTM.mot
  report_errors: true
  marker_file: E:\AxonAIRepo\axonai_vps\Data\session_bc9f2352d8\MarkerData\OpenPose_default\PostAugmentation_v0.3\trial_bc9f2352d8_LSTM.trc
  report_marker_locations: false
  IKTaskSet:
    IKMarkerTask C7_study: apply=true weight=5
    IKMarkerTask r_shoulder_study: apply=true weight=5
    IKMarkerTask L_shoulder_study: apply=true weight=5
    IKMarkerTask r.ASIS_study: apply=true weight=25
    IKMarkerTask L.ASIS_study: apply=true weight=25
    IKMarkerTask r.PSIS_study: apply=true weight=25
    IKMarkerTask L.PSIS_study: apply=true weight=25
    IKMarkerTask r_knee_study: apply=true weight=30
    IKMarkerTask r_mknee_study: apply=true weight=30
    IKMarkerTask r_ankle_study: apply=true weight=30
    IKMarkerTask r_mankle_study: apply=true weight=30
    IKMarkerTask r_toe_study: apply=true weight=30
    IKMarkerTask r_5meta_study: apply=true weight=30
    IKMarkerTask r_calc_study: apply=true weight=60
    IKMarkerTask L_knee_study: apply=true weight=30
    IKMarkerTask L_mknee_study: apply=true weight=30
    IKMarkerTask L_ankle_study: apply=true weight=30
    IKMarkerTask L_mankle_study: apply=true weight=30
    IKMarkerTask L_toe_study: apply=true weight=30
    IKMarkerTask L_calc_study: apply=true weight=60
    IKMarkerTask L_5meta_study: apply=true weight=30
    IKMarkerTask r_lelbow_study: apply=true weight=5
    IKMarkerTask L_lelbow_study: apply=true weight=5
    IKMarkerTask r_melbow_study: apply=true weight=5
    IKMarkerTask L_melbow_study: apply=true weight=5
    IKMarkerTask r_lwrist_study: apply=true weight=5
    IKMarkerTask L_lwrist_study: apply=true weight=5
    IKMarkerTask r_mwrist_study: apply=true weight=5
    IKMarkerTask L_mwrist_study: apply=true weight=5
    IKMarkerTask r_thigh1_study: apply=true weight=4
    IKMarkerTask r_thigh2_study: apply=true weight=4
    IKMarkerTask r_thigh3_study: apply=true weight=4
    IKMarkerTask L_thigh1_study: apply=true weight=4
    IKMarkerTask L_thigh2_study: apply=true weight=4
    IKMarkerTask L_thigh3_study: apply=true weight=4
    IKMarkerTask r_sh1_study: apply=true weight=4
    IKMarkerTask r_sh2_study: apply=true weight=4
    IKMarkerTask r_sh3_study: apply=true weight=4
    IKMarkerTask L_sh1_study: apply=true weight=4
    IKMarkerTask L_sh2_study: apply=true weight=4
    IKMarkerTask L_sh3_study: apply=true weight=4
    IKMarkerTask RHJC_study: apply=true weight=25
    IKMarkerTask LHJC_study: apply=true weight=25
